*Heading
** Job name: P_SI_v3 Model name: P_SI_v3
** Generated by: Abaqus/CAE 2025
*Preprint, echo=NO, model=NO, history=NO, contact=NO
** ----------------------------------------------------------------
**
** PART INSTANCE: P_SI_v3-1
**
*Node, nset=nall
      1,           0., 0.0464500003,           0.
      2,           0., 0.0464500003, 1.52499997e-05
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*Element, type=QEC3D8, elset=eall
 1, 1214, 4719, 4723, 1211,    1, 1203, 1206,    4
 2, 4719, 4720, 4724, 4723, 1203, 1204, 1205, 1206
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*Nset, nset=Separator
    1,    2,    3,    4,    5,    6
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*Elset, elset=Separator
    1,    2,    3,    4,    5,    6
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*Nset, nset=AnodeBot
    2,    3,    5,    6,    9,   12
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*Elset, elset=AnodeBot
   55,   56,   57,   58,   59,   60
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*Nset, nset=AnodeTop
   25,   26,   27,   28,   29,   30
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*Elset, elset=AnodeTop
   46,   47,   48,   49,   50,   51
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*Nset, nset=AnodeCollector
   25,   26,   29,   30,   33,   34
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*Elset, elset=AnodeCollector
   82,   83,   84,   85,   86,   87
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*Nset, nset=Anode
    2,    3,    5,    6,    9,   12
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*Elset, elset=Anode
   46,   47,   48,   49,   50,   51
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*Nset, nset=CathodeBot
   65,   66,   67,   68,   69,   70
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*Elset, elset=CathodeBot
  229,  230,  231,  232,  233,  234
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*Nset, nset=CathodeCollector
   77,   78,   79,   80,   83,   84
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*Elset, elset=CathodeCollector
  265,  266,  267,  268,  269,  270
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*Nset, nset=Cathode
   65,   66,   67,   68,   69,   70
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*Elset, elset=Cathode
  229,  230,  231,  232,  233,  234
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*Nset, nset=NegTab
   61,   62,   63,   64,  165,  166
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*Elset, elset=NegTab, generate
 3889,  3987,     1
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*Elset, elset=PosTab, generate
 3988,  4077,     1
*Nset, nset=TOPSRF
 1105, 1106, 1107, 1108, 1109, 1110
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*Nset, nset=BOTSRF
    1,    4,    7,    8,   10,   11
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*Elset, elset=NegTerminal, generate
 4078,  4086,     1
*Nset, nset=NegTerminalSet
 1185, 1186, 1187, 1188, 4695, 4696, 4697, 4698
*Elset, elset=NegTerminalSet, generate
 4081,  4083,     1
*Nset, nset=PosTerminal
 1149, 1150, 1151, 1152, 1191, 1192
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*Elset, elset=PosTerminal, generate
 4087,  4095,     1
*Nset, nset=PosTerminalSet
 1197, 1198, 1199, 1200, 4711, 4712, 4713, 4714
*Elset, elset=PosTerminalSet, generate
 4090,  4092,     1
*Elset, elset=_NegTabSurf_S5, generate
 3889,  3921,     1
*Surface, type=ELEMENT, name=NegTabSurf
_NegTabSurf_S5, S5
*Elset, elset=_PosTabSurf_S5, generate
 3988,  4017,     1
*Surface, type=ELEMENT, name=PosTabSurf
_PosTabSurf_S5, S5
*Elset, elset=_NegTerminalSurf_S5, generate
 4081,  4083,     1
*Surface, type=ELEMENT, name=NegTerminalSurf
_NegTerminalSurf_S5, S5
*Elset, elset=_PosTerminalSurf_S5, generate
 4090,  4092,     1
*Surface, type=ELEMENT, name=PosTerminalSurf
_PosTerminalSurf_S5, S5
*Elset, elset=_BottomSurface_S5
   28,   29,   30,   31,   32,   33
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*Elset, elset=_BottomSurface_S2
  145,  146,  147,  148,  149,  150
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*Surface, type=ELEMENT, name=BottomSurface
_BottomSurface_S5, S5
_BottomSurface_S2, S2
*Elset, elset=_Side1Surface0_S2
   1,   2,   3,  10,  11,  12
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*Elset, elset=_Side1Surface0_S3
  10,  11,  12,  13,  14,  15
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*Elset, elset=_Side1Surface0_S6
   1,   4,   7,  10,  13,  16
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*Elset, elset=_Side1Surface0_S4
   3,   6,   9,  12,  15,  18
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*Elset, elset=_Side1Surface0_S1
   7,   8,   9,  16,  17,  18
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*Elset, elset=_Side1Surface0_S5
   1,   2,   3,   4,   5,   6
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*Surface, type=ELEMENT, name=Side1Surface0
_Side1Surface0_S2, S2
_Side1Surface0_S3, S3
_Side1Surface0_S6, S6
_Side1Surface0_S4, S4
_Side1Surface0_S1, S1
_Side1Surface0_S5, S5
*Elset, elset=_Side1Surface21_S3
 3706, 3707, 3708, 3724, 3725, 3726
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*Elset, elset=_Side1Surface21_S1
 3748, 3749, 3750, 3814, 3815, 3816
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*Elset, elset=_Side1Surface21_S6
 3706, 3709, 3712, 3724, 3727, 3730
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*Elset, elset=_Side1Surface21_S2
 3706, 3707, 3708, 3709, 3710, 3711
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*Elset, elset=_Side1Surface21_S4
 3708, 3711, 3714, 3726, 3729, 3732
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*Elset, elset=_Side1Surface21_S5
 3712, 3713, 3714, 3730, 3731, 3732
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*Surface, type=ELEMENT, name=Side1Surface21
_Side1Surface21_S3, S3
_Side1Surface21_S1, S1
_Side1Surface21_S6, S6
_Side1Surface21_S2, S2
_Side1Surface21_S4, S4
_Side1Surface21_S5, S5
*Elset, elset=_TopSurface_S5
    1,    2,    3,    4,    5,    6
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*Elset, elset=_TopSurface_S2
   64,   65,   66,   67,   68,   69
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*Surface, type=ELEMENT, name=TopSurface
_TopSurface_S5, S5
_TopSurface_S2, S2
** Section: Separator
*Orientation, name=Ori
1,0,0, 0,1,0, 0,0,0
1,0
*Solid Section, elset=Separator, material=ABQ_EChemPET_Separator, orientation=ori
,
** Section: Anode
*Solid Section, elset=Anode, material=ABQ_EChemPET_Anode, orientation=ori
,
** Section: AnodeCollector
*Solid Section, elset=AnodeCollector, material=AnodeCollector, orientation=ori
,
** Section: Cathode
*Solid Section, elset=Cathode, material=ABQ_EChemPET_Cathode, orientation=ori
,
** Section: CathodeCollector
*Solid Section, elset=CathodeCollector, material=CathodeCollector, orientation=ori
,
** Section: NegTab
*Solid Section, elset=NegTab, material=AnodeCollector, orientation=ori
,
** Section: PosTab
*Solid Section, elset=PosTab, material=CathodeCollector, orientation=ori
,
** Section: NegTerminal
*Solid Section, elset=NegTerminal, material=AnodeTerminal
,
** Section: PosTerminal
*Solid Section, elset=PosTerminal, material=CathodeTerminal
,
*System
**
** MATERIALS
**
*****
*****
*****
*****
*****
*****
*****
*****
*****
*Nset, nset=N_ANODE
25
*Elset, elset=EL_ANODE
46
*Nset, nset=N_CATHODE
81
*Elset, elset=EL_CATHODE
238
*Nset, nset=N_SEPARATOR
1
*Elset, elset=EL_SEPARATOR
1
*Nset, nset=VSENSOR
1158
*Nset, nset=SENSOR
1197
*Nset, nset=N_LOAD
PosTerminalSet
*Nset, nset=N_GROUND
NegTerminalSet
*Node, nset=refnode
6768, 0,0,0
*Node, nset=refnode_bot
6778, 0,0,0
*EQUATION
2
N_LOAD, 9, 1.0, refnode, 9, -1.0
2
N_GROUND, 9, 1.0, refnode_bot, 9, -1.0
*************************************
*Material, name=CathodeTerminal
*Electrical Conductivity
 22085
*Density
 2700
*Conductivity
 200
*Specific Heat
 870
*JOULE HEAT FRACTION
 1
*Elastic
 70000000000,  .3
*************************************
*Material, name=AnodeTerminal
*Electrical Conductivity
 60000000
*Density
 9000
*Conductivity
 380
*Specific Heat
 381
*JOULE HEAT FRACTION
 1
*Elastic
 70000000000,  .3
*************************************
**
**************************************************************
**
**************************************************************
**************************************************************
*physical constants, STEFAN BOLTZMANN=0.00000005669 , absolute zero = 0., faraday constant = 96485.3329, universal gas constant = 8.314, boltzmann = 1.38064852E-23, avogadro Number = 6.02214086E+23, elementary charge = 1.602176634E-19
**************************************************************
**************************************************************
** Parameter/Property Definition
**************************************************************
** PARAMETER/PROPERTY TABLE TYPES
**************************************************************
** FOR AGEING ---------------------------------------------------
*PARAMETER TABLE TYPE, name = "ABQ_EChemPET_Electrode_Particle_SEI", parameters= 10
 FLOAT ,  "alpha_asei"
 FLOAT ,  "alpha_csei"
 FLOAT ,  "k0_sei"
 FLOAT ,  "c0_sei"
 FLOAT ,  "cec_surf0_sei"
 FLOAT ,  "cec0_sei"
 FLOAT ,  "beta"
 FLOAT ,  "rho_sei"
 FLOAT ,  "mass_sei"
 FLOAT ,  "chargenum_sei"
*Property TABLE TYPE, name = "ABQ_EChemPET_Electrode_Particle_SEI_OCPTabular", properties = 1, independent variables = 1
**E_sei, C_ec
*Property TABLE TYPE, name = "ABQ_EChemPET_Electrode_Particle_CurrXchgDens_SEI_Tabular", properties = 1, independent variables = 1
**I_o_sei, C_ec
*Property TABLE TYPE, name = "ABQ_EChemPET_Electrode_Particle_SEI_DiffTabular", properties = 1, independent variables = 1
**Dif_sei, Cec
*Property TABLE TYPE, name = "ABQ_EChemPET_Electrode_Particle_SEI_IonCondTabular", properties = 1, independent variables = 1
**Cond _Ksei, Cec
*Property TABLE TYPE, name = "ABQ_EChemPET_Electrode_Particle_SEI_ElecCondTabular", properties = 1, independent variables = 1
**ElecCond _sigmasei, Cec
*Property TABLE TYPE, name = "ABQ_EChemPET_Electrode_Particle_CurrXchgDens_CrackSEI_Tabular", properties = 1, independent variables = 1
**I_o_sei, C_ec
*Property TABLE TYPE, name = "ABQ_EChemPET_Electrode_Particle_SEI_CrackFunction_Tabular", properties = 1, independent variables = 1
** f_crack val, c_avg
*PARAMETER TABLE TYPE, name ="ABQ_EChemPET_Electrode_Particle_LPL", parameters= 4
 FLOAT ,  "alpha_lpl"
 FLOAT ,  "c0_lpl"
 FLOAT ,  "rho_lpl"
 FLOAT ,  "mass_lpl"
*Property TABLE TYPE, name ="ABQ_EChemPET_Electrode_Particle_CurrXchgDens_LPL_Tabular", properties = 1, independent variables = 1
**I_o_lpl, C_lpl
*PARAMETER TABLE TYPE, name ="ABQ_EChemPET_Electrode_Particle_LPL_ActivationPot", parameters= 2
Float , " potentialMin"
Float , " potentialMax"
**
*PARAMETER TABLE TYPE, name = "ABQ_EChemPET_Electrode_Particle_ElectrodeDissolution", parameters=1
FLOAT , "Total cathode Thickness"
*Property TABLE TYPE, name = "ABQ_EChemPET_Electrode_Particle_ElecDiss_OCPTabular", Properties = 1, independent variables = 1
**E_sei
** DUMMY 0/1
*Property TABLE type, Name = "ABQ_EChemPET_Electrode_Particle_CurrXchgDens_ElecDiss_Tabular", properties=1, independent variable = 1
** I0_diss
** temp
** FOR AGEING ---------------------------------------------------
*PARAMETER TABLE TYPE, NAME="ABQ_EChemPET_Arrhenius", PARAMETER=2
**   This parameter table is required when the temperature dependency
**       x(T) = k * x(T0) * exp (E_a / R * (1.0/T0 - 1.0/T))
  FLOAT   , "E_a ... Activation energy of diffusion coeff in this layer material"
  FLOAT   , "T0 ... Reference Temperature"
**
*PARAMETER TABLE TYPE, NAME="ABQ_EChemPET_CubicSplineC2", PARAMETER=6
**   Define cubic spline polynomials data
  FLOAT   , "xStart"
  FLOAT   , "xEnd"
  FLOAT   , "Coeff_x^3"
  FLOAT   , "Coeff_x^2"
  FLOAT   , "Coeff_x^1"
  FLOAT   , "Coeff_x^0"
**
*PROPERTY TABLE TYPE, NAME="ABQ_EChemPET_LogScale_Tabular", PROPERTIES=1, INDEPENDENT VARIABLES=1
** Col.01: Log of diffusion coefficient in the particle (log10(D_s)) [m2/s]
** Col.02: Normalized Li-ion concentration in the particle (c_s) [-]
** Col.03: (OPTIONAL) Temperature (T) [K]
**
**************************************************************
** ELECTROLYTE
**************************************************************
*PARAMETER TABLE TYPE, NAME="ABQ_EChemPET_Electrolyte", PARAMETER=3
  STRING  , "Electrolyte name (PF6 etc.)"
  FLOAT   , "Charge number of Lithium ion battery"
  FLOAT   , "\mu(Li)"
**
*PROPERTY TABLE TYPE, NAME="ABQ_EChemPET_Electrolyte_ElecCond_Tabular", PROPERTIES=1, INDEPENDENT VARIABLES=2
** Col.01: Electrical conductivity in the liquid phase (kappa_e) [S/m]
** Col.02: Li-ion concentration in the liquid phase (C_e) [mol/m3]
** Col.03: Convection-replated independent variable.
** Col.04: (OPTIONAL) Temperature (T) [K]
**
*PROPERTY TABLE TYPE, NAME="ABQ_EChemPET_Electrolyte_DiffTabular", PROPERTIES=1, INDEPENDENT VARIABLES=2
** Col.01: Diffusion coefficient in the liquid phase (D_e) [m2/s]
** Col.02: Li-ion concentration in the liquid phase (C_e) [mol/m3]
** Col.03: Convection-replated independent variable.
** Col.04: (OPTIONAL) Temperature (T) [K]
**
*PROPERTY TABLE TYPE, NAME="ABQ_EChemPET_Electrolyte_MolarActivityCoeff_fPM", PROPERTIES=1, INDEPENDENT VARIABLES=1
** Col.01: Part of molar activity coefficient (d ln(f_\pm)/d ln(C_e)) in Eq.(7) in [Liu2019] [-]
** Col.02: Li-ion concentration in the liquid phase (C_e) [mol/m3]
** Col.03: (OPTIONAL) Temperature (T) [K]
**
*PROPERTY TABLE TYPE, NAME="ABQ_EChemPET_Electrolyte_Transference", PROPERTIES=1, INDEPENDENT VARIABLES=1
** Col.01: Transference value
** Col.02: Li-ion concentration in the liquid phase (C_e) [mol/m3]
** Col.03: (OPTIONAL) Temperature (T) [K]
**
*PROPERTY TABLE TYPE, NAME="ABQ_EChemPET_Electrolyte_ChargeDischarge", PROPERTIES=1, INDEPENDENT VARIABLES=2
** Col.01: FlagID (Charge/Discharge etc.)
** Col.02: Step time
** Col.03: Step Number
**
**
**************************************************************
** ELECTRODE
**************************************************************
** Definition ------------------------------------------------
*PARAMETER TABLE TYPE, NAME="ABQ_EChemPET_Electrode_Definition", PARAMETER=12
STRING  , "Region Name"
STRING  , "Region Type: Anode/Cathode/Separator"
FLOAT   , "epsS ... Total volume fraction of solids"
FLOAT   , "epsE ... Volume fraction of electrolyte in cathode/anode"
FLOAT   , "epsB ... Volume fraction of binder in cathode/anode (epsB=1.0-(epsS + epsE))"
FLOAT   , "epsSinact ... Inactive volume fraction of solids"
FLOAT   , "UtilFrac ... fraction of utilization of the cathode (1.0 at the anode)"
FLOAT   , "C_SEI ... capacity loss due to initial SEI formation in the first few cycles"
FLOAT   , "alphaT  ... Bruggeman exponent in thickness direction (Z)"
FLOAT   , "alphaMD ... Bruggeman exponent in the Manufacturing direction (X)"
FLOAT   , "alphaTD ... Bruggeman exponent in the Transverse direction (Y)"
FLOAT   ,0, "ConvCoef ... Convection Coefficient (Default is 0.0, and set 1.0 for swelling)"
**
** Macroscale ------------------------------------------------
*PROPERTY TABLE TYPE, NAME="ABQ_EChemPET_Electrode_ElecCond_Tabular", PROPERTIES=1, INDEPENDENT VARIABLES=1
** Col.01: Electrical conductivity in the liquid phase (kappa_e) [S/m]
** Col.02: Average Li-ion concentration in the solid phase (C_s_avg) [mol/m3]
** Col.03: (OPTIONAL) Temperature (T) [K]
**
** Microscale: Particle/Layer definition ---------------------
*PARAMETER TABLE TYPE, NAME="ABQ_EChemPET_Electrode_Particles", PARAMETER=5
STRING  , "Name of the particle type"
FLOAT   , "rad_p ... Particle outer radius"
FLOAT   , "epsSP ... Volume fraction for each particle type"
FLOAT   , "c_s_init ... Initial concentration of Particle"
STRING  , "Formulation_### (Concentration / ChemicalPotential)"
**
*PARAMETER TABLE TYPE, NAME="ABQ_EChemPET_Electrode_Particle_Layers", PARAMETER=2
** NOTE that 1st layer is inner layer, and the last layer is outer Layer_
STRING  , "Name of the layer - Carbon/Silicon/Binder/ParticleNMC811/NMC841/etc."
FLOAT   , "epsL_wt ... Wt. percentage of the layer"
**
*PARAMETER TABLE TYPE, NAME="ABQ_EChemPET_Electrode_Particle_Layer_Discretization", PARAMETER=2
INTEGER , "Number or segments/elements in this layer"
STRING  , "Distribution type: Uniform/Quadratic/EquiVolumetric"
**
** Microscale: Properties in layer ---------------------------
*PARAMETER TABLE TYPE, NAME="ABQ_EChemPET_Electrode_Particle_Layer_Diffusion", PARAMETER=3
FLOAT   , "c_s_max ... Max Li concentration in solid substance"
STRING  , "DiffusionModel_### (Tabular / LogTabular / CoeffSpline)"
STRING  , "DiffusionModel_### (ChemoMech / Chemopot)"
**
*PROPERTY TABLE TYPE, NAME="ABQ_EChemPET_Electrode_Particle_Layer_SwellingTabular", PROPERTIES=1, INDEPENDENT VARIABLES=1
** Col.01: Volumetric expansion rate by swelling
** Col.02: normalized averaged concentration (c_s_ave)
**
*Parameter Table Type, Name="ABQ_EChemPET_Electrode_Swelling", parameter = 3
Float , 0.333, "Scalingfac x SwellingCoeff - Xdir"
Float, 0.333, "Scalingfac x SwellingCoeff - Ydir"
Float, 0.333, "Scalingfac x SwellingCoeff - Zdir"
**
*PROPERTY TABLE TYPE, NAME="ABQ_EChemPET_Electrode_Particle_Layer_OCPTabular", PROPERTIES=1, INDEPENDENT VARIABLES=1
** Col.01: Open circuit potential (E_ref) [V]
** Col.02: Normalized concentration at the surface of the particle (c_s_surf) [-]
** Col.03: (OPTIONAL) Temperature (T) [K]
**
*PARAMETER TABLE TYPE, NAME="ABQ_EChemPET_Electrode_Particle_Layer_OCPTabularNoInterp", PARAMETERS=2
FLOAT   , "Open circuit potential (E_ref) [V]"
FLOAT   , "Normalized Li-ion concentration at the surface of the particle (c_s_surf) [-]"
**
*PROPERTY TABLE TYPE, NAME="ABQ_EChemPET_Electrode_Particle_Layer_DsTabular", PROPERTIES=1, INDEPENDENT VARIABLES=1
** Col.01: Diffusion coefficient in the particle (D_s) [m2/s]
** Col.02: Normalized Li-ion concentration in the particle (c_s) [-]
** Col.03: (OPTIONAL) Temperature (T) [K]
**
** Microscale: Butler-Volmer equation ------------------------
*PARAMETER TABLE TYPE, NAME="ABQ_EChemPET_Electrode_Particle_ButlerVolmer", PARAMETER=8
FLOAT   , "k_c ... Cathodic rate constant"
FLOAT   , "k_a ... Anodic rate constant"
FLOAT   , "alpha_c ... Cathodic transfer coefficient"
FLOAT   , "alpha_a ... Anodic transfer coefficient"
FLOAT   , "C_e_ref ... Reference value of Li concentration in the electrolyte"
FLOAT   , "R_SEI ... Resistance of SEI to reduce the overpotential"
FLOAT   , "SurfaceStressCoeff ... partial molar volume coeff for hydrostratic stress"
FLOAT   , "a_S ... particle surface area/unit volume - ignored if_Formula above"
**
*PARAMETER TABLE TYPE, NAME="ABQ_EChemPET_Electrode_Particle_IBVUser", PARAMETER=1
 integer, ":=1, uechemecdbv, :=0, Abaqus computed"
*PARAMETER TABLE TYPE, NAME="ABQ_EChemPET_Electrode_Particle_ILPLUser", PARAMETER=1
 integer, ":=1, uechemecdlpl, :=0, Abaqus computed"
*PARAMETER TABLE TYPE, NAME="ABQ_EChemPET_Electrode_Particle_ISEIUser", PARAMETER=1
 integer, ":=1, uechemecdbv, :=0, Abaqus computed"
*PARAMETER TABLE TYPE, NAME="ABQ_EChemPET_Electrode_Particle_ISEIReformUser", PARAMETER=1
 integer, ":=1, uechemecdbv, :=0, Abaqus computed"
*PARAMETER TABLE TYPE, NAME="ABQ_EChemPET_Electrode_Particle_IDISSUser", PARAMETER=1
 integer, ":=1, uechemecdbv, :=0, Abaqus computed"
*PROPERTY TABLE TYPE, NAME="ABQ_EChemPET_Electrode_Particle_CurrXchgDens_Tabular", PROPERTIES=1, INDEPENDENT VARIABLES=1
** Col.01: Exchange current density (I_0(c_s,T)) [A]
** Col.02: Normalized Li-ion concentration in the particle (c_s) [-]
** Col.03: (OPTIONAL) Temperature (T) [K]
**
** Microscale: Convergion control ----------------------------
*Parameter Table Type, Name = "ABQ_EChemPET_Electrode_Particle_ConvergenceControls", parameter=8
Float , 0.15, "Minium xCr to trigger usage damping until xCr = 0.0"
Float , 0.85, "Maximum xCr to trigger usage of damping until xCr= 1.0"
Float, 1, "Viscous Damping value"
Float, 20.0, "Coeff. Used in exp(coeff * xCr)"
Float, 0.05, "Change in BVI allowed between increments"
Float, 0.05, "Change in csurf allowed between increments"
Float, 0.025, "Change in OCP allowed between increments"
Float, 0.25, "PnewDT Define if microscale doesn't converge"
**
** Thermal property ------------------------------------------
*PARAMETER TABLE TYPE, NAME="ABQ_EChemPET_Electrode_PowerLoss", PARAMETER=3
FLOAT   , "fraction of Ohmic losses to transform into heat in electrode"
FLOAT   , "fraction of Ohmic losses to transform into heat in electrolyte"
FLOAT   , "fraction of Ohmic losses to transform into heat due to ionic diffusion"
**
*PARAMETER TABLE TYPE, NAME="ABQ_EChemPET_Electrode_Particle_PowerLoss", PARAMETER=2
FLOAT   , "fraction of Ohmic losses to transform into heat at solid/liquid interface"
FLOAT   , "fraction of entropy generation terms to transform into heat"
**
*PROPERTY TABLE TYPE, NAME="ABQ_EChemPET_Electrode_Particle_dUdTEntropy_Tabular", PROPERTIES=1, INDEPENDENT VARIABLES=1
** Col.01: dU/dT [V/K]
** Col.02: C_s_avg [-]
**
**
**************************************************************
** Material Definition
**********************************************************************************
**********************************************************************************
*MATERIAL, NAME=ABQ_ECHEMPET_ANODE
** Electrolyte - Electrochemical definition
*PARAMETER TABLE, TYPE="ABQ_EChemPET_Electrolyte", LABEL="ABQ_EChemPET_Electrolyte"
 "MAT_ELECTROLYTE", 1.0, 1.0
**
*PROPERTY TABLE, TYPE="ABQ_EChemPET_Electrolyte_ElecCond_Tabular", LABEL="ABQ_EChemPET_MAT_ELECTROLYTE_ElecCond_Tabular", TEMPERATURE
**-------k_e_1..n,-------C_e_1..n,------Porosity   ,---------T_1..n,
**          [S/m],       [mol/m3],       [-]             [K],
6.58239906307779, 500, 0, 283.15
7.0868887122692, 600, 0, 283.15
7.41978717726505, 700, 0, 283.15
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6.80387720211569, 1500, 1, 313.15
*PROPERTY TABLE, TYPE="ABQ_EChemPET_Electrolyte_Transference", LABEL="ABQ_EChemPET_MAT_ELECTROLYTE_Transference", TEMPERATURE
***------tPlus_1..n,-------C_e_1..n,---------T_1..n,
**            [-]        [mol/m3],            [K],
0.1612625, 500, 283.15
0.1461048, 600, 283.15
0.1335779, 700, 283.15
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0.0667125, 1500, 313.15
*PROPERTY TABLE, TYPE="ABQ_EChemPET_Electrolyte_MolarActivityCoeff_fPM", LABEL="ABQ_EChemPET_MAT_ELECTROLYTE_MolarActivityCoeff_fPM", TEMPERATURE
***------coef_1..n,-------C_e_1..n,---------T_1..n,
**            [-]        [mol/m3],            [K],
-0.0964694, 500, 283.15
-0.02222193, 600, 283.15
0.0578966, 700, 283.15
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-0.4927608, 1500, 313.15
*PROPERTY TABLE, TYPE="ABQ_EChemPET_Electrolyte_DiffTabular", LABEL="ABQ_EChemPET_MAT_ELECTROLYTE_DiffTabular", TEMPERATURE
**-------D_e_1..n,-------C_e_1..n,-------  Porosity   ,---------T_1..n,
**          [m2/s],       [mol/m3],         [-]               [K],
0.000000000172635, 500, 0, 283.15
0.0000000001506, 600, 0, 283.15
0.0000000001298, 700, 0, 283.15
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0.000000000098138, 1500, 1, 313.15
**
**
**-------------------------------------------------------------------------
**----------------           Macro Scale     ------------------------------
**-------------------------------------------------------------------------
********
*DENSITY
 2300
*CONDUCTIVITY
 1
*SPECIFIC HEAT
 750
**
*Elastic, dependencies=1
2500000, 0.25, , 106
3641805, 0.25, , 185
5327800, 0.25, , 372
9984800, 0.25, , 735
15600000, 0.25, , 1827
**
**    You can add plastic material property here
**
*PARAMETER TABLE, TYPE="ABQ_EChemPET_Electrode_Particle_ILPLUser", LABEL="ABQ_EChemPET_MAT_ANODE_ParticleC_ILPLUser"
1
*USER DEFINED FIELD
*DepVar
2
1, conclpl_irev, "Ireversible plated lithium"
2, pore_filling_lithium, "Pore filling lithium in plating and sei"
*PARAMETER TABLE, TYPE="ABQ_EChemPET_Electrode_Definition", LABEL="ABQ_EChemPET_Electrode_Definition"
**-Name--------------,-Type--------------,
  "MAT_ANODE"        , "Anode"
**-----------epsS,-----------epsE,-----------epsB,------epsSinact,-------UtilFrac,----------C_SEI,
0.57, 0.28, 0.15, 0, 1, 0
**---------alphaT,--------alphaMD,--------alphaTD,------ConvCoeff,
0.5, 0.5, 0.5,  1
**
*PROPERTY TABLE, TYPE="ABQ_EChemPET_Electrode_ElecCond_Tabular", LABEL="ABQ_EChemPET_MAT_ANODE_ElecCond_Tabular"
**--------kappa_s,-----csnorm_avg,----Temperature,
**          [S/m],   (normalized),            [K],
100, 0
100, 1
**
*PARAMETER TABLE, TYPE="ABQ_EChemPET_Electrode_PowerLoss", LABEL="ABQ_EChemPET_MAT_ANODE_PowerLoss"
**--------kappa_s,-----csnorm_avg,----Temperature,
**          [S/m],   (normalized),            [K],
1, 1, 1
**
*PARAMETER TABLE, TYPE="ABQ_EChemPET_Electrode_Particles", LABEL="ABQ_EChemPET_MAT_ANODE_Particles"
**-ParticleName------,----------rad_p,----------epsSP,--------cs_init,-Formulation(Concentration/ChemicalPotential),
"ParticleC" , 0.000005, 1, 906, "Formulation_Concentration"
**
**
**
**
*PARAMETER TABLE, TYPE="ABQ_EChemPET_Electrode_Particle_Layers", LABEL="ABQ_EChemPET_MAT_ANODE_ParticleC_Layers"
**-LayerName---------,--------epsL_wt
 "Layer1",                   1.0
**
**
*PARAMETER TABLE, TYPE="ABQ_EChemPET_Electrode_Particle_Layer_Discretization", LABEL="ABQ_EChemPET_MAT_ANODE_ParticleC_Layer1_Discretization"
**-----nElement per Layer,
30,
**-----DistributionType(Uniform/Quadratic/EquiVolumetric)
"EquiVolumetric"
**
**
*PARAMETER TABLE, TYPE="ABQ_EChemPET_Electrode_Particle_Layer_Diffusion", LABEL="ABQ_EChemPET_MAT_ANODE_ParticleC_Layer1_Diffusion"
**---------cs_max,
31507,
**---------DiffusionModel(Tabular/LogTabular/CoeffSpline),
"DiffusionModel_LogTabular",
**----------DiffusionModel(ChemoMech/Chemopot),
"DiffusionModel_ChemoMech"
**
**
*PROPERTY TABLE, TYPE="ABQ_EChemPET_LogScale_Tabular", LABEL="ABQ_EChemPET_MAT_ANODE_ParticleC_Layer1_DsLogTabular", TEMPERATURE
**-Log10(D_s),-----Csnorm,-----T_1..n,
**     [m2/s]         [-]         [K],
-13.5878964475567, 0, 298
-13.5878964475567, 1, 298
-13.5084014523555, 0, 300
-13.5084014523555, 1, 300
-13.0164468015415, 0, 313
-13.0164468015415, 1, 313
**
**
*PROPERTY TABLE, TYPE="ABQ_EChemPET_Electrode_Particle_Layer_OCPTabular", LABEL="ABQ_EChemPET_MAT_ANODE_ParticleC_Layer1_OCPTabular", extrapolation=linear
**----------E_ref,-------C_s_surf,-----------Temp
**            [V]    (normalized)             [K],
2.781186612	,	0
1.520893224	,	0.01
0.693922607	,	0.02
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0.071045433, 1.0
**
*PROPERTY TABLE, TYPE="ABQ_EChemPET_Electrode_Particle_Layer_SwellingTabular", LABEL="ABQ_EChemPET_MAT_ANODE_ParticleC_Layer1_SwellingTabular"
**-------swelling,---csnorm_1...n,
1, 0
1.00015, 0.0068
1.00217, 0.04317
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1.101905, 0.95725
**
**
**
*PARAMETER TABLE, TYPE="ABQ_EChemPET_Electrode_Particle_ButlerVolmer", LABEL="ABQ_EChemPET_MAT_ANODE_ParticleC_ButlerVolmer"
**------------k_c,------------k_a,--------alpha_c,--------alpha_a,
**            [-],            [-],            [-],            [-],
0.00000000003, 0.00000000003, 0.5, 0.5,
**--------C_e_ref,----------R_SEI,-SurfStressCoef,
**       [mol/m3],     [Omega/m2],            [-],
1, 0, 0,
**--------a_s,
**--------[1/m]
 0
**
**
**
**
*PARAMETER TABLE, TYPE="ABQ_EChemPET_Electrode_Particle_PowerLoss", LABEL="ABQ_EChemPET_MAT_ANODE_ParticleC_PowerLoss"
**---HF_Interface,--HF_EntropyGen,
1, 1
**
**
*PROPERTY TABLE, TYPE="ABQ_EChemPET_Electrode_Particle_dUdTEntropy_Tabular", LABEL="ABQ_EChemPET_MAT_ANODE_ParticleC_dUdTEntropy_Tabular"
**------dU/dT,-Csnorm_avg,
**      [V/K]         [-]
0.0003, 0
0, 0.17
-0.00006, 0.24
-0.00016, 0.28
-0.00016, 0.5
-0.00009, 0.54
-0.00009, 0.71
-0.0001, 0.85
-0.00012, 1
**
**
*PARAMETER TABLE, TYPE="ABQ_EChemPET_Electrode_Particle_SEI", LABEL="ABQ_EChemPET_MAT_ANODE_ParticleC_SEI"
**------------alpha_asei,------------alpha_csei,--------k0_sei,--------cec0_sei,--------cec_surf0_sei,--------c0_sei,
**                   [-],                  [-],       [m/s],       [mol/m^3],              [-],         [mol/m^3],
0.05, 0.95, 0.000000000001, 4541, 0.1, 95.94803,
**--------beta,----------rho_sei,----------mass_sei,
**       [-],          [kg/m3],            [kg/mol],
0, 2640, 0.02594,
**--------chargenum_sei,
**--------[-]
 2
**
**
*PROPERTY TABLE, TYPE="ABQ_EChemPET_Electrode_Particle_SEI_OCPTabular", LABEL="ABQ_EChemPET_MAT_ANODE_ParticleC_SEI_OCPTabular", extrapolation=linear
**------E_sei,-------Csei,
**      [V]         [mol/m3]
0.4, 0
0.4, 100
**
**
*PROPERTY TABLE, TYPE="ABQ_EChemPET_Electrode_Particle_SEI_DiffTabular", LABEL="ABQ_EChemPET_MAT_ANODE_ParticleC_SEI_DiffTabular"
**------D_sei,-------Csei,
**      [m^2/s]         [mol/m3]
2E-18, 0
2E-18, 100
**
**
*PROPERTY TABLE, TYPE="ABQ_EChemPET_Electrode_Particle_SEI_IonCondTabular", LABEL="ABQ_EChemPET_MAT_ANODE_ParticleC_SEI_IonCondTabular"
**------K_ion_sei,-------Csei,
**      [S/m]         [mol/m3]
5e-6, 0
5e-6, 100
**
**
*PROPERTY TABLE, TYPE="ABQ_EChemPET_Electrode_Particle_SEI_ElecCondTabular", LABEL="ABQ_EChemPET_MAT_ANODE_ParticleC_SEI_ElecCondTabular"
**------K_ElecCond_sei,-------Csei,
**      [S/m]         [mol/m3]
5e-6, 0
5e-6, 100
**
**
*PROPERTY TABLE, TYPE="ABQ_EChemPET_Electrode_Particle_CurrXchgDens_SEI_Tabular", LABEL="ABQ_EChemPET_MAT_ANODE_ParticleC_CurrXchgDens_SEI_Tabular"
**------I_Xsei,-------Norm_Csei,
**      [A/m2]         [-]
0.25e-8, 0
0.25e-8, 1
**0.35e-8, 0
**0.35e-8, 1
**
**
***PROPERTY TABLE, TYPE="ABQ_EChemPET_Electrode_Particle_CurrXchgDens_CrackSEI_Tabular", LABEL="ABQ_EChemPET_MAT_ANODE_ParticleC_CurrXchgDens_CrackSEI_Tabular"
**------I_XCracksei,-------Norm_Csei,
**      [A/m2]         [-]
**0.0000000002, 0
**0.0000000002, 1
**
**
***PROPERTY TABLE, TYPE="ABQ_EChemPET_Electrode_Particle_SEI_CrackFunction_Tabular", LABEL="ABQ_EChemPET_MAT_ANODE_ParticleC_SEI_CrackFunction_Tabular"
**------SEI_Crackfc,-------Norm_Csei,
**      [-]         [-]
**
**
*PARAMETER TABLE, TYPE="ABQ_EChemPET_Electrode_Particle_LPL", LABEL="ABQ_EChemPET_MAT_ANODE_ParticleC_LPL"
**------alpha_lpl,------c0_lpl,------rho_lpl,-------mass_lpl,
**      [-]         [mol/m3]         [kg/m3]         [kg/mol]
0.5, 10, 534, 0.00694
**
**
*PROPERTY TABLE, TYPE="ABQ_EChemPET_Electrode_Particle_CurrXchgDens_LPL_Tabular", LABEL="ABQ_EChemPET_MAT_ANODE_ParticleC_CurrXchgDens_LPL_Tabular"
**------I_lpl,-------Clpl,
**      [A/m^2]      [mol/m^3]
**0.0, 0
0, 0
0, 1
**
*PARAMETER TABLE, TYPE="ABQ_EChemPET_Electrode_Particle_LPL_ActivationPot", LABEL="ABQ_EChemPET_MAT_ANODE_ParticleC_LPL_ActivationPot"
*** Assuming there is no Li-plating evidence in the test.
** So set up as usual.
-1.e5, 1.e5
**
*POROUS ELECTRODE THEORY
**********************************************************************************
**********************************************************************************
**********************************************************************************
**********************************************************************************
*MATERIAL, NAME=ABQ_ECHEMPET_CATHODE
** Electrolyte - Electrochemical definition
*PARAMETER TABLE, TYPE="ABQ_EChemPET_Electrolyte", LABEL="ABQ_EChemPET_Electrolyte"
 "MAT_ELECTROLYTE", 1.0, 1.0
**
*PROPERTY TABLE, TYPE="ABQ_EChemPET_Electrolyte_ElecCond_Tabular", LABEL="ABQ_EChemPET_MAT_ELECTROLYTE_ElecCond_Tabular", TEMPERATURE
**-------k_e_1..n,-------C_e_1..n,------Porosity   ,---------T_1..n,
**          [S/m],       [mol/m3],       [-]             [K],
6.58239906307779, 500, 0, 283.15
7.0868887122692, 600, 0, 283.15
7.41978717726505, 700, 0, 283.15
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6.80387720211569, 1500, 1, 313.15
*PROPERTY TABLE, TYPE="ABQ_EChemPET_Electrolyte_Transference", LABEL="ABQ_EChemPET_MAT_ELECTROLYTE_Transference", TEMPERATURE
***------tPlus_1..n,-------C_e_1..n,---------T_1..n,
**            [-]        [mol/m3],            [K],
0.1612625, 500, 283.15
0.1461048, 600, 283.15
0.1335779, 700, 283.15
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0.0667125, 1500, 313.15
*PROPERTY TABLE, TYPE="ABQ_EChemPET_Electrolyte_MolarActivityCoeff_fPM", LABEL="ABQ_EChemPET_MAT_ELECTROLYTE_MolarActivityCoeff_fPM", TEMPERATURE
***------coef_1..n,-------C_e_1..n,---------T_1..n,
**            [-]        [mol/m3],            [K],
-0.0964694, 500, 283.15
-0.02222193, 600, 283.15
0.0578966, 700, 283.15
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-0.4927608, 1500, 313.15
*PROPERTY TABLE, TYPE="ABQ_EChemPET_Electrolyte_DiffTabular", LABEL="ABQ_EChemPET_MAT_ELECTROLYTE_DiffTabular", TEMPERATURE
**-------D_e_1..n,-------C_e_1..n,-------  Porosity   ,---------T_1..n,
**          [m2/s],       [mol/m3],         [-]               [K],
0.000000000172635, 500, 0, 283.15
0.0000000001506, 600, 0, 283.15
0.0000000001298, 700, 0, 283.15
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0.000000000098138, 1500, 1, 313.15
**
**
**-------------------------------------------------------------------------
**----------------           Macro Scale     ------------------------------
**-------------------------------------------------------------------------
********
*DENSITY
 1000
*CONDUCTIVITY
 5
*SPECIFIC HEAT
5878
**
*Elastic
24600000, 0.3
**
**    You can add plastic material property here
**
*PARAMETER TABLE, TYPE="ABQ_EChemPET_Electrode_Definition", LABEL="ABQ_EChemPET_Electrode_Definition"
**-Name--------------,-Type--------------,
  "MAT_CATHODE"        , "Cathode"
**-----------epsS,-----------epsE,-----------epsB,------epsSinact,-------UtilFrac,----------C_SEI,
0.57, 0.28, 0.15, 0, 1, 1
**---------alphaT,--------alphaMD,--------alphaTD,------ConvCoeff,
0.5, 0.5, 0.5,  1
**
*PROPERTY TABLE, TYPE="ABQ_EChemPET_Electrode_ElecCond_Tabular", LABEL="ABQ_EChemPET_MAT_CATHODE_ElecCond_Tabular", TEMPERATURE
**--------kappa_s,-----csnorm_avg,----Temperature,
**          [S/m],   (normalized),            [K],
0.1, 0, 290.15
0.1, 1, 290.15
0.1, 0, 298.15
0.1, 1, 298.15
**
*PARAMETER TABLE, TYPE="ABQ_EChemPET_Electrode_PowerLoss", LABEL="ABQ_EChemPET_MAT_CATHODE_PowerLoss"
**--------kappa_s,-----csnorm_avg,----Temperature,
**          [S/m],   (normalized),            [K],
1, 1, 1
**
*PARAMETER TABLE, TYPE="ABQ_EChemPET_Electrode_Particles", LABEL="ABQ_EChemPET_MAT_CATHODE_Particles"
**-ParticleName------,----------rad_p,----------epsSP,--------cs_init,-Formulation(Concentration/ChemicalPotential),
"ParticleNMC811" , 0.0000005, 1, 45524.5, "Formulation_Concentration"
**
**
**
**
*PARAMETER TABLE, TYPE="ABQ_EChemPET_Electrode_Particle_Layers", LABEL="ABQ_EChemPET_MAT_CATHODE_ParticleNMC811_Layers"
**-LayerName---------,--------epsL_wt
 "Layer1",                   1.0
**
**
*PARAMETER TABLE, TYPE="ABQ_EChemPET_Electrode_Particle_Layer_Discretization", LABEL="ABQ_EChemPET_MAT_CATHODE_ParticleNMC811_Layer1_Discretization"
**-----nElement per Layer,
30,
**-----DistributionType(Uniform/Quadratic/EquiVolumetric)
"EquiVolumetric"
**
**
*PARAMETER TABLE, TYPE="ABQ_EChemPET_Electrode_Particle_Layer_Diffusion", LABEL="ABQ_EChemPET_MAT_CATHODE_ParticleNMC811_Layer1_Diffusion"
**---------cs_max,
47664,
**---------DiffusionModel(Tabular/LogTabular/CoeffSpline),
"DiffusionModel_LogTabular",
**----------DiffusionModel(ChemoMech/Chemopot),
"DiffusionModel_ChemoMech"
**
**
*PROPERTY TABLE, TYPE="ABQ_EChemPET_LogScale_Tabular", LABEL="ABQ_EChemPET_MAT_CATHODE_ParticleNMC811_Layer1_DsLogTabular"
**-Log10(D_s),-----Csnorm,-----T_1..n,
**     [m2/s]         [-]         [K],
-12.698970004336, 0
-12.698970004336, 1
**
**
*PROPERTY TABLE, TYPE="ABQ_EChemPET_Electrode_Particle_Layer_OCPTabular", LABEL="ABQ_EChemPET_MAT_CATHODE_ParticleNMC811_Layer1_OCPTabular", extrapolation=linear
**----------E_ref,-------C_s_surf,-----------Temp
**            [V]    (normalized)             [K],
**4.600998753	,	0
4.133258846	,	0.336
4.125998753	,	0.34
4.109679658	,	0.36
4.096419228	,	0.38
4.082786825	,	0.40
4.031099555	,	0.45
4.012864912	,	0.47
3.979433465	,	0.51
3.964385536	,	0.53
3.94798691	,	0.55
3.933627036	,	0.57
3.918393186	,	0.6
3.897293928	,	0.62
3.881331607	,	0.64
3.854477796	,	0.66
3.827874398	,	0.68
3.804023252	,	0.7
3.755602127	,	0.75
3.738615276	,	0.77
3.727198512	,	0.79
3.716036767	,	0.81
3.703229147	,	0.85
3.699966972	,	0.87
3.692210989	,	0.89
3.663471061	,	0.914
3.62534799	,	0.928
3.516336562	,	0.946
3.414929116	,	0.948
3.317727334	,	0.95
3.0	,	1.0
**
*PROPERTY TABLE, TYPE="ABQ_EChemPET_Electrode_Particle_Layer_SwellingTabular", LABEL="ABQ_EChemPET_MAT_CATHODE_ParticleNMC811_Layer1_SwellingTabular"
**-------swelling,---csnorm_1...n,
0.95182	,	0.186
0.95839	,	0.224
0.9643	,	0.257
0.97064	,	0.282
0.97633	,	0.313
0.98027	,	0.345
0.98312	,	0.371
0.98509	,	0.405
0.9864	,	0.433
0.9875	,	0.466
0.98837	,	0.494
0.98925	,	0.525
0.99034	,	0.553
0.99122	,	0.583
0.99187	,	0.615
0.99275	,	0.641
0.99297	,	0.671
0.99384	,	0.699
0.99472	,	0.736
0.99581	,	0.764
0.99603	,	0.795
0.99713	,	0.823
0.998	,	0.851
0.99866	,	0.879
0.99975	,	0.911
**
*PARAMETER TABLE, TYPE="ABQ_EChemPET_Electrode_Particle_ButlerVolmer", LABEL="ABQ_EChemPET_MAT_CATHODE_ParticleNMC811_ButlerVolmer"
**------------k_c,------------k_a,--------alpha_c,--------alpha_a,
**            [-],            [-],            [-],            [-],
0.0000000000394, 0.0000000000394, 0.5, 0.5,
**--------C_e_ref,----------R_SEI,-SurfStressCoef,
**       [mol/m3],     [Omega/m2],            [-],
1, 0, 0,
**--------a_s,
**--------[1/m]
 0
**
**
**
**
*PARAMETER TABLE, TYPE="ABQ_EChemPET_Electrode_Particle_PowerLoss", LABEL="ABQ_EChemPET_MAT_CATHODE_ParticleNMC811_PowerLoss"
**---HF_Interface,--HF_EntropyGen,
1, 1
**
**
*PROPERTY TABLE, TYPE="ABQ_EChemPET_Electrode_Particle_dUdTEntropy_Tabular", LABEL="ABQ_EChemPET_MAT_CATHODE_ParticleNMC811_dUdTEntropy_Tabular"
**------dU/dT,-Csnorm_avg,
**      [V/K]         [-]
0, 0.001273153
0, 0.051527977
0, 0.104780497
0, 0.154722819
0, 0.204684432
0, 0.251320414
0, 0.304596083
0, 0.351251355
0, 0.399538578
0, 0.452848969
0, 0.504473397
0, 0.546136366
0, 0.604427486
0, 0.647749413
0, 0.704370001
0, 0.7510137
0, 0.797587954
0, 0.85086748
0, 0.89941705
0, 0.95243423
0, 1
**
**
*PARAMETER TABLE, TYPE="ABQ_EChemPET_Electrode_Particle_ElectrodeDissolution", LABEL="ABQ_EChemPET_MAT_CATHODE_ParticleNMC811_ElectrodeDissolution"
**------thickness,
**      [m]
 0.000079
**
**
*PROPERTY TABLE, TYPE="ABQ_EChemPET_Electrode_Particle_ElecDiss_OCPTabular", LABEL="ABQ_EChemPET_MAT_CATHODE_ParticleNMC811_ElecDiss_OCPTabular", extrapolation=linear
**------E_diss,-------norm_Cdiss,
**      [V]         [mol/m^3]
4.01, 0
4.01, 1
**
**
*PROPERTY TABLE, TYPE="ABQ_EChemPET_Electrode_Particle_CurrXchgDens_ElecDiss_Tabular", LABEL="ABQ_EChemPET_MAT_CATHODE_ParticleNMC811_CurrXchgDens_ElecDiss_Tabular"
**------I_diss,-------Cdiss,
**      [A/m2]         [mol/m^3]
0.0, 0
**0.00001, 0
**0.00001, 300
**
**
**
*POROUS ELECTRODE THEORY
**********************************************************************************
**********************************************************************************
**********************************************************************************
**********************************************************************************
*MATERIAL, NAME=ABQ_ECHEMPET_SEPARATOR
** Electrolyte - Electrochemical definition
*PARAMETER TABLE, TYPE="ABQ_EChemPET_Electrolyte", LABEL="ABQ_EChemPET_Electrolyte"
 "MAT_ELECTROLYTE", 1.0, 1.0
**
*PROPERTY TABLE, TYPE="ABQ_EChemPET_Electrolyte_ElecCond_Tabular", LABEL="ABQ_EChemPET_MAT_ELECTROLYTE_ElecCond_Tabular", TEMPERATURE
**-------k_e_1..n,-------C_e_1..n,------Porosity   ,---------T_1..n,
**          [S/m],       [mol/m3],       [-]             [K],
6.58239906307779, 500, 0, 283.15
7.0868887122692, 600, 0, 283.15
7.41978717726505, 700, 0, 283.15
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6.80387720211569, 1500, 1, 313.15
*PROPERTY TABLE, TYPE="ABQ_EChemPET_Electrolyte_Transference", LABEL="ABQ_EChemPET_MAT_ELECTROLYTE_Transference", TEMPERATURE
***------tPlus_1..n,-------C_e_1..n,---------T_1..n,
**            [-]        [mol/m3],            [K],
0.1612625, 500, 283.15
0.1461048, 600, 283.15
0.1335779, 700, 283.15
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0.0667125, 1500, 313.15
*PROPERTY TABLE, TYPE="ABQ_EChemPET_Electrolyte_MolarActivityCoeff_fPM", LABEL="ABQ_EChemPET_MAT_ELECTROLYTE_MolarActivityCoeff_fPM", TEMPERATURE
***------coef_1..n,-------C_e_1..n,---------T_1..n,
**            [-]        [mol/m3],            [K],
-0.0964694, 500, 283.15
-0.02222193, 600, 283.15
0.0578966, 700, 283.15
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-0.4927608, 1500, 313.15
*PROPERTY TABLE, TYPE="ABQ_EChemPET_Electrolyte_DiffTabular", LABEL="ABQ_EChemPET_MAT_ELECTROLYTE_DiffTabular", TEMPERATURE
**-------D_e_1..n,-------C_e_1..n,-------  Porosity   ,---------T_1..n,
**          [m2/s],       [mol/m3],         [-]               [K],
0.000000000172635, 500, 0, 283.15
0.0000000001506, 600, 0, 283.15
0.0000000001298, 700, 0, 283.15
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0.000000000098138, 1500, 1, 313.15
**
**
**-------------------------------------------------------------------------
**----------------           Macro Scale     ------------------------------
**-------------------------------------------------------------------------
********
*DENSITY
 1000
*CONDUCTIVITY
 5
*SPECIFIC HEAT
 2750
**
*Elastic
24600000, 0.3
**
**    You can add plastic material property here
**
*PARAMETER TABLE, TYPE="ABQ_EChemPET_Electrode_Definition", LABEL="ABQ_EChemPET_Electrode_Definition"
**-Name--------------,-Type--------------,
  "MAT_SEPARATOR"        , "Separator"
**-----------epsS,-----------epsE,-----------epsB,------epsSinact,-------UtilFrac,----------C_SEI,
0.6, 0.4, 0, 0, 1, 0
**---------alphaT,--------alphaMD,--------alphaTD,------ConvCoeff,
0.5, 0.5, 0.5,  0
**
*PROPERTY TABLE, TYPE="ABQ_EChemPET_Electrode_ElecCond_Tabular", LABEL="ABQ_EChemPET_MAT_SEPARATOR_ElecCond_Tabular", TEMPERATURE
**--------kappa_s,-----csnorm_avg,----Temperature,
**          [S/m],   (normalized),            [K],
0, 0, 298.15
0, 1000, 298.15
0, 0, 299.15
0, 1000, 299.15
**
*PARAMETER TABLE, TYPE="ABQ_EChemPET_Electrode_PowerLoss", LABEL="ABQ_EChemPET_MAT_SEPARATOR_PowerLoss"
**--------kappa_s,-----csnorm_avg,----Temperature,
**          [S/m],   (normalized),            [K],
0, 1, 1
**
**
**
*POROUS ELECTRODE THEORY
**********************************************************************************
**********************************************************************************
**********************************************************************************
**********************************************************************************
*MATERIAL, NAME=ANODECOLLECTOR
*DENSITY
 9000
*CONDUCTIVITY
 380
*SPECIFIC HEAT
 381
*JOULE HEAT FRACTION
 1
*ELECTRICAL CONDUCTIVITY
 60000000
*ELASTIC
70000000000, 0.3
**********************************************************************************
**********************************************************************************
*MATERIAL, NAME=CATHODECOLLECTOR
*DENSITY
 2700
*CONDUCTIVITY
 200
*SPECIFIC HEAT
 870
*JOULE HEAT FRACTION
 1
*ELECTRICAL CONDUCTIVITY
 38000000
*ELASTIC
70000000000, 0.3
**
**************************************************************
** Initial Conditions
*INITIAL CONDITIONS, TYPE=TEMPERATURE
NALL, 298.15
*INITIAL CONDITIONS, TYPE=SOLID ELECTRIC POTENTIAL
ANODE, 0
REFNODE_BOT, 0
CATHODE, 3.00784265266776
REFNODE, 3.00784265266776
ANODECOLLECTOR, 0
CATHODECOLLECTOR, 3.00784265266776
*INITIAL CONDITIONS, TYPE=FLUID ELECTRIC POTENTIAL
CATHODE, -0.481480374709207
SEPARATOR, -0.481480374709207
ANODE, -0.481480374709207
*INITIAL CONDITIONS, TYPE=ION CONCENTRATION
CATHODE, 1000
SEPARATOR, 1000
ANODE, 1000
**
**************************************************************
**
*AMPLITUDE, NAME=AMP_CONST
**-------TIME,------VALUE,
     0.000e+0,      1.000,
     1.000e+8,      1.000,
**
*AMPLITUDE, NAME=AMP_CURRENT
**-------TIME,------VALUE,
     0.000e+0,      1.000,
     2.000e+0,      1.000,
     1.000e+8,      1.000,
**** -----------------------------------------------------------------------------------------------------------------------
*STEP, NAME=EQUILBRIUM, INC=250000000, UNSYMM=YES, NLGEOM=YES
*COUPLED TEMPERATURE-DISPLACEMENT, ELECTROCHEMICAL
1e-6,  1e-6,  1.0e-8, 1e-6
**
*MONITOR, NODE=SENSOR, DOF=9
**
**
*BOUNDARY, OP=NEW
**NSET-----------,-DOF1,-DOF2,------VALUE,
  refnode_bot      ,    9,    9,        0.0,
nall, 11, 11, 298.15
BOTSRF, 1, 3, 0
**
*CECURRENT, OP=NEW
REFNODE, 9, 0.0
**
** This BC makes easy on the analysis.
*BOUNDARY, OP=NEW
CATHODE, 33,33, 1000
SEPARATOR, 33,33, 1000
ANODE, 33,33, 1000
*FILM, OP=NEW
**ELSET----------,---TYPE,-------------T0,------VALUE,
  EALL ,              FFS,  298.15, 0.1
**
*RESTART, WRITE, FREQ=9999999
*OUTPUT, FIELD, freq=1
*node output
  epot, epote, nnce, nt, u
  recure, rflce, por
*element output
hfl, mfle, ecd, ecde, conce, elecpote, elecpot, TEMP, EEIG, LE, S, E, PEEQ
CONCGE, EPGE, FLUIDVF, SOLIDVF, BINDERVF
ECHEMQ1, ECHEMQ2, ECHEMQ3, ECHEMQ4, ECHEMQ5, CSURFAVG, ECDBV, LOGGRAINJG, EVOL
CSURF_1, OCP_1, CAVG_1, TOTALC_1, ECDBV_1, OVERPOT_1, ECHEMQ1_1, ECHEMQ2_1, VOLE_1
CSURF_2, OCP_2, CAVG_2, TOTALC_2, ECDBV_2, OVERPOT_2, ECHEMQ1_2, ECHEMQ2_2, VOLE_2
CSURF_3, OCP_3, CAVG_2, TOTALC_3, ECDBV_3, OVERPOT_3, ECHEMQ1_3, ECHEMQ2_3, VOLE_3
SAT, FLVEL
**
*END STEP
**----------------------------------------------------------------
*STEP, NAME=COMPRESS, INC=250000000, UNSYMM=YES, NLGEOM=YES
*COUPLED TEMPERATURE-DISPLACEMENT, ELECTROCHEMICAL
1.e-2, 1.0, 1e-3, 1.0
*CONTROLS, PARAMETER=FIELD, convergence check=relaxed
*BOUNDARY, OP=NEW
refnode_bot      ,    9,    9,        0.0,
TOPSRF, 1, 2, 0.
TOPSRF, 3, 3, -7.0e-6
BOTSRF, 1, 3, 0
**NALL, 1, 2, 0
*BOUNDARY, OP=NEW, AMPLITUDE=AMP_CONST
nall, 11, 11, 298.15
*OUTPUT, HISTORY, FREQUENCY=1
*NODE OUTPUT, nset=BOTSRF
RF3,U3
*NODE OUTPUT, nset=TOPSRF
U3
*ELEMENT OUTPUT, ELSET=EL_ANODE
ECD,   hfl, mfle, ecde, conce, elecpote, elecpot, TEMP, EEIG, LE, S, E, peeq, MISES, PRESS, PEQC
CONCGE, EPGE, FLUIDVF, SOLIDVF, BINDERVF
*OUTPUT, FIELD, freq=1
*node output
  epot, epote, nnce, nt, u
  recure, rflce, por
*element output
hfl, mfle, ecd, ecde, conce, elecpote, elecpot, TEMP, EEIG, LE, S, E, PEEQ
CONCGE, EPGE, FLUIDVF, SOLIDVF, BINDERVF
ECHEMQ1, ECHEMQ2, ECHEMQ3, ECHEMQ4, ECHEMQ5, CSURFAVG, ECDBV, LOGGRAINJG, EVOL
CSURF_1, OCP_1, CAVG_1, TOTALC_1, ECDBV_1, OVERPOT_1, ECHEMQ1_1, ECHEMQ2_1, VOLE_1
CSURF_2, OCP_2, CAVG_2, TOTALC_2, ECDBV_2, OVERPOT_2, ECHEMQ1_2, ECHEMQ2_2, VOLE_2
CSURF_3, OCP_3, CAVG_2, TOTALC_3, ECDBV_3, OVERPOT_3, ECHEMQ1_3, ECHEMQ2_3, VOLE_3
SAT, FLVEL
*RESTART, WRITE, FREQ=9999999
*end step
**** -----------------------------------------------------------------------------------------------------------------------
*STEP CYCLING, START, NAME=Aging
200, 1, 1
**** -----------------------------------------------------------------------------------------------------------------------
*STEP, NAME=charge 1, INC=250000000, UNSYMM=YES, NLGEOM=YES
*COUPLED TEMPERATURE-DISPLACEMENT, ELECTROCHEMICAL
0.1,  10000000,  1.0e-6, 10
**
*MONITOR, NODE=SENSOR, DOF=9
*CONTROLS, RESET
**
**
**
**
**
**
*STEP CONTROL, ACTION=END STEP, NAME=CONTROLVOLTAGE, DT REFINEMENT=AUTO
"VOLTAGECUTOFF", ABSMAX, 4.18
**
*BOUNDARY, OP=NEW
**NSET-----------,-DOF1,-DOF2,------VALUE,
  REFNODE_BOT      ,    9,    9,        0.0,
nall, 11, 11, 298.15
**
*BOUNDARY, OP=NEW
TOPSRF, 1, 2, 0.
TOPSRF, 3, 3, -7.0e-6
BOTSRF, 1, 3, 0
*CECURRENT, OP=NEW, AMPLITUDE=AMP_CURRENT
  REFNODE ,       9, 1.25
**
*FILM, OP=NEW, AMPLITUDE=AMP_CONST
**ELSET----------,---TYPE,-------------T0,------VALUE,
  EALL ,              FFS,  298.15, 0.1
**
**
*OUTPUT, HISTORY, FREQUENCY=1, SENSOR, NAME=VOLTAGECUTOFF
*NODE OUTPUT, NSET=SENSOR
EPOT
**
**
*OUTPUT, FIELD, freq=200
*node output
  epot, epote, nnce, nt, u
  recure, rflce, por
*element output
hfl, mfle, ecd, ecde, conce, elecpote, elecpot, TEMP,EEIG, LE, S, E, peeq, MISES, PRESS, PEQC
CONCGE, EPGE, FLUIDVF, SOLIDVF, BINDERVF
ECHEMQ1, ECHEMQ2, ECHEMQ3, ECHEMQ4, ECHEMQ5, CSURFAVG, ECDBV, LOGGRAINJG, EVOL
CSURF_1, OCP_1, CAVG_1, TOTALC_1, ECDBV_1, OVERPOT_1, ECHEMQ1_1, ECHEMQ2_1, VOLE_1
CSURF_2, OCP_2, CAVG_2, TOTALC_2, ECDBV_2, OVERPOT_2, ECHEMQ1_2, ECHEMQ2_2, VOLE_2
CSURF_3, OCP_3, CAVG_2, TOTALC_3, ECDBV_3, OVERPOT_3, ECHEMQ1_3, ECHEMQ2_3, VOLE_3
SAT, FLVEL
CONCLPL_1 , CONCSEI_1, CONCSOL_1, ECDLPL_1, ECDSEI_1, ECDCRACKSEI_1, ECDELECDISS_1, ECDTOTAL, SEILPLTHICK_1
CONCLPL_2 , CONCSEI_2, CONCSOL_2, ECDLPL_2, ECDSEI_2, ECDCRACKSEI_2, ECDELECDISS_2, ECDTOTAL, SEILPLTHICK_2
CONCLPL_3 , CONCSEI_3, CONCSOL_3, ECDLPL_3, ECDSEI_3, ECDCRACKSEI_3, ECDELECDISS_3, ECDTOTAL, SEILPLTHICK_3
EPOTLPL, SDV
OVERPOTSEI_1 , OVERPOTCRACKSEI_1, OVERPOTLPL_1, OVERPOTDISS_1
OVERPOTSEI_2 , OVERPOTCRACKSEI_2, OVERPOTLPL_2, OVERPOTDISS_2
OVERPOTSEI_3 , OVERPOTCRACKSEI_3, OVERPOTLPL_3, OVERPOTDISS_3
**
*OUTPUT, HISTORY, FREQUENCY=1
*NODE OUTPUT, nset=BOTSRF
RF3,U3
*NODE OUTPUT, NSET=SENSOR
EPOT, RECUR
*NODE OUTPUT, NSET=VSENSOR
EPOT, RECUR
*NODE OUTPUT, NSET=refnode
EPOT, RECUR
*node output, nset=refnode_bot
RECUR
*NODE OUTPUT, NSET=N_ANODE
epot, epote, nnce, nt, u
recure, rflce, por
*NODE OUTPUT, NSET=N_CATHODE
epot, epote, nnce, nt, u
recure, rflce, por
*NODE OUTPUT, NSET=N_SEPARATOR
epot, epote, nnce, nt, u
recure, rflce, por
**
*ELEMENT OUTPUT
AMOUNT, AMOUNTS, AMOUNTE, amountimmobile
*ELEMENT OUTPUT, ELSET=ANODE
AMOUNT, AMOUNTS, AMOUNTE
*ELEMENT OUTPUT, ELSET=CATHODE
AMOUNT, AMOUNTS, AMOUNTE
*ELEMENT OUTPUT, ELSET=SEPARATOR
AMOUNTE
*ELEMENT OUTPUT, ELSET=EL_ANODE
ECD,   hfl, mfle, ecde, conce, elecpote, elecpot, TEMP, EEIG, LE, S, E, peeq, MISES, PRESS, PEQC
CONCGE, EPGE, FLUIDVF, SOLIDVF, BINDERVF
ECHEMQ1, ECHEMQ2, ECHEMQ3, ECHEMQ4, ECHEMQ5, CSURFAVG, ECDBV, LOGGRAINJG, EVOL
CSURF_1, OCP_1, CAVG_1, TOTALC_1, ECDBV_1, OVERPOT_1, ECHEMQ1_1, ECHEMQ2_1, VOLE_1
CSURF_2, OCP_2, CAVG_2, TOTALC_2, ECDBV_2, OVERPOT_2, ECHEMQ1_2, ECHEMQ2_2, VOLE_2
CSURF_3, OCP_3, CAVG_2, TOTALC_3, ECDBV_3, OVERPOT_3, ECHEMQ1_3, ECHEMQ2_3, VOLE_3
SAT, FLVEL
CONCLPL_1 , CONCSEI_1, CONCSOL_1, ECDLPL_1, ECDSEI_1, ECDCRACKSEI_1, ECDELECDISS_1, ECDTOTAL, SEILPLTHICK_1
CONCLPL_2 , CONCSEI_2, CONCSOL_2, ECDLPL_2, ECDSEI_2, ECDCRACKSEI_2, ECDELECDISS_2, ECDTOTAL, SEILPLTHICK_2
CONCLPL_3 , CONCSEI_3, CONCSOL_3, ECDLPL_3, ECDSEI_3, ECDCRACKSEI_3, ECDELECDISS_3, ECDTOTAL, SEILPLTHICK_3
EPOTLPL, SDV
*ELEMENT OUTPUT, ELSET=EL_CATHODE
ECD,   hfl, mfle, ecde, conce, elecpote, elecpot, TEMP, EEIG, LE, S, E, peeq, MISES, PRESS, PEQC
CONCGE, EPGE, FLUIDVF, SOLIDVF, BINDERVF
ECHEMQ1, ECHEMQ2, ECHEMQ3, ECHEMQ4, ECHEMQ5, CSURFAVG, ECDBV, LOGGRAINJG, EVOL
CSURF_1, OCP_1, CAVG_1, TOTALC_1, ECDBV_1, OVERPOT_1, ECHEMQ1_1, ECHEMQ2_1, VOLE_1
CSURF_2, OCP_2, CAVG_2, TOTALC_2, ECDBV_2, OVERPOT_2, ECHEMQ1_2, ECHEMQ2_2, VOLE_2
CSURF_3, OCP_3, CAVG_2, TOTALC_3, ECDBV_3, OVERPOT_3, ECHEMQ1_3, ECHEMQ2_3, VOLE_3
SAT, FLVEL
CONCLPL_1 , CONCSEI_1, CONCSOL_1, ECDLPL_1, ECDSEI_1, ECDCRACKSEI_1, ECDELECDISS_1, ECDTOTAL, SEILPLTHICK_1
CONCLPL_2 , CONCSEI_2, CONCSOL_2, ECDLPL_2, ECDSEI_2, ECDCRACKSEI_2, ECDELECDISS_2, ECDTOTAL, SEILPLTHICK_2
CONCLPL_3 , CONCSEI_3, CONCSOL_3, ECDLPL_3, ECDSEI_3, ECDCRACKSEI_3, ECDELECDISS_3, ECDTOTAL, SEILPLTHICK_3
*ELEMENT OUTPUT, ELSET=EL_SEPARATOR
ECD,   hfl, mfle, ecde, conce, elecpote, elecpot, TEMP, EEIG, LE, S, E, peeq, MISES, PRESS, PEQC
CONCGE, EPGE, FLUIDVF, SOLIDVF, BINDERVF
ECHEMQ1, ECHEMQ2, ECHEMQ3, ECHEMQ4, ECHEMQ5, CSURFAVG, ECDBV, LOGGRAINJG, EVOL
CSURF_1, OCP_1, CAVG_1, TOTALC_1, ECDBV_1, OVERPOT_1, ECHEMQ1_1, ECHEMQ2_1, VOLE_1
CSURF_2, OCP_2, CAVG_2, TOTALC_2, ECDBV_2, OVERPOT_2, ECHEMQ1_2, ECHEMQ2_2, VOLE_2
CSURF_3, OCP_3, CAVG_2, TOTALC_3, ECDBV_3, OVERPOT_3, ECHEMQ1_3, ECHEMQ2_3, VOLE_3
SAT, FLVEL
CONCLPL_1 , CONCSEI_1, CONCSOL_1, ECDLPL_1, ECDSEI_1, ECDCRACKSEI_1, ECDELECDISS_1, ECDTOTAL, SEILPLTHICK_1
CONCLPL_2 , CONCSEI_2, CONCSOL_2, ECDLPL_2, ECDSEI_2, ECDCRACKSEI_2, ECDELECDISS_2, ECDTOTAL, SEILPLTHICK_2
CONCLPL_3 , CONCSEI_3, CONCSOL_3, ECDLPL_3, ECDSEI_3, ECDCRACKSEI_3, ECDELECDISS_3, ECDTOTAL, SEILPLTHICK_3
*END STEP
**** -----------------------------------------------------------------------------------------------------------------------
*STEP, NAME=charge 2, INC=250000000, UNSYMM=YES, NLGEOM=YES
*COUPLED TEMPERATURE-DISPLACEMENT, ELECTROCHEMICAL
0.1,  10000000,  1.0e-6, 2
**
*MONITOR, NODE=SENSOR, DOF=9
*CONTROLS, RESET
**
**
**
**
**
**
*STEP CONTROL, ACTION=END STEP, NAME=CONTROLVOLTAGE
"VOLTAGECUTOFF", ABSMAX, 4.2
**
*BOUNDARY, OP=NEW
**NSET-----------,-DOF1,-DOF2,------VALUE,
  REFNODE_BOT      ,    9,    9,        0.0,
nall, 11, 11, 298.15
**
*BOUNDARY, OP=NEW
TOPSRF, 1, 2, 0.
TOPSRF, 3, 3, -7.0e-6
BOTSRF, 1, 3, 0
*CECURRENT, OP=NEW, AMPLITUDE=AMP_CURRENT
  REFNODE ,       9, 1.25
**
*FILM, OP=NEW, AMPLITUDE=AMP_CONST
**ELSET----------,---TYPE,-------------T0,------VALUE,
  EALL ,              FFS,  298.15, 0.1
**
**
*OUTPUT, HISTORY, FREQUENCY=1, SENSOR, NAME=VOLTAGECUTOFF
*NODE OUTPUT, NSET=SENSOR
EPOT
**
**
*OUTPUT, FIELD, freq=200
*node output
  epot, epote, nnce, nt, u
  recure, rflce, por
*element output
hfl, mfle, ecd, ecde, conce, elecpote, elecpot, TEMP,EEIG, LE, S, E, peeq, MISES, PRESS, PEQC
CONCGE, EPGE, FLUIDVF, SOLIDVF, BINDERVF
ECHEMQ1, ECHEMQ2, ECHEMQ3, ECHEMQ4, ECHEMQ5, CSURFAVG, ECDBV, LOGGRAINJG, EVOL
CSURF_1, OCP_1, CAVG_1, TOTALC_1, ECDBV_1, OVERPOT_1, ECHEMQ1_1, ECHEMQ2_1, VOLE_1
CSURF_2, OCP_2, CAVG_2, TOTALC_2, ECDBV_2, OVERPOT_2, ECHEMQ1_2, ECHEMQ2_2, VOLE_2
CSURF_3, OCP_3, CAVG_2, TOTALC_3, ECDBV_3, OVERPOT_3, ECHEMQ1_3, ECHEMQ2_3, VOLE_3
SAT, FLVEL
CONCLPL_1 , CONCSEI_1, CONCSOL_1, ECDLPL_1, ECDSEI_1, ECDCRACKSEI_1, ECDELECDISS_1, ECDTOTAL, SEILPLTHICK_1
CONCLPL_2 , CONCSEI_2, CONCSOL_2, ECDLPL_2, ECDSEI_2, ECDCRACKSEI_2, ECDELECDISS_2, ECDTOTAL, SEILPLTHICK_2
CONCLPL_3 , CONCSEI_3, CONCSOL_3, ECDLPL_3, ECDSEI_3, ECDCRACKSEI_3, ECDELECDISS_3, ECDTOTAL, SEILPLTHICK_3
EPOTLPL, SDV
OVERPOTSEI_1 , OVERPOTCRACKSEI_1, OVERPOTLPL_1, OVERPOTDISS_1
OVERPOTSEI_2 , OVERPOTCRACKSEI_2, OVERPOTLPL_2, OVERPOTDISS_2
OVERPOTSEI_3 , OVERPOTCRACKSEI_3, OVERPOTLPL_3, OVERPOTDISS_3
**
*OUTPUT, HISTORY, FREQUENCY=1
*NODE OUTPUT, nset=BOTSRF
RF3,U3
*NODE OUTPUT, NSET=SENSOR
EPOT, RECUR
*NODE OUTPUT, NSET=VSENSOR
EPOT, RECUR
*NODE OUTPUT, NSET=refnode
EPOT, RECUR
*node output, nset=refnode_bot
RECUR
*NODE OUTPUT, NSET=N_ANODE
epot, epote, nnce, nt, u
recure, rflce, por
*NODE OUTPUT, NSET=N_CATHODE
epot, epote, nnce, nt, u
recure, rflce, por
*NODE OUTPUT, NSET=N_SEPARATOR
epot, epote, nnce, nt, u
recure, rflce, por
**
*ELEMENT OUTPUT
AMOUNT, AMOUNTS, AMOUNTE, amountimmobile
*ELEMENT OUTPUT, ELSET=ANODE
AMOUNT, AMOUNTS, AMOUNTE
*ELEMENT OUTPUT, ELSET=CATHODE
AMOUNT, AMOUNTS, AMOUNTE
*ELEMENT OUTPUT, ELSET=SEPARATOR
AMOUNTE
*ELEMENT OUTPUT, ELSET=EL_ANODE
ECD,   hfl, mfle, ecde, conce, elecpote, elecpot, TEMP, EEIG, LE, S, E, peeq, MISES, PRESS, PEQC
CONCGE, EPGE, FLUIDVF, SOLIDVF, BINDERVF
ECHEMQ1, ECHEMQ2, ECHEMQ3, ECHEMQ4, ECHEMQ5, CSURFAVG, ECDBV, LOGGRAINJG, EVOL
CSURF_1, OCP_1, CAVG_1, TOTALC_1, ECDBV_1, OVERPOT_1, ECHEMQ1_1, ECHEMQ2_1, VOLE_1
CSURF_2, OCP_2, CAVG_2, TOTALC_2, ECDBV_2, OVERPOT_2, ECHEMQ1_2, ECHEMQ2_2, VOLE_2
CSURF_3, OCP_3, CAVG_2, TOTALC_3, ECDBV_3, OVERPOT_3, ECHEMQ1_3, ECHEMQ2_3, VOLE_3
SAT, FLVEL
CONCLPL_1 , CONCSEI_1, CONCSOL_1, ECDLPL_1, ECDSEI_1, ECDCRACKSEI_1, ECDELECDISS_1, ECDTOTAL, SEILPLTHICK_1
CONCLPL_2 , CONCSEI_2, CONCSOL_2, ECDLPL_2, ECDSEI_2, ECDCRACKSEI_2, ECDELECDISS_2, ECDTOTAL, SEILPLTHICK_2
CONCLPL_3 , CONCSEI_3, CONCSOL_3, ECDLPL_3, ECDSEI_3, ECDCRACKSEI_3, ECDELECDISS_3, ECDTOTAL, SEILPLTHICK_3
EPOTLPL, SDV
*ELEMENT OUTPUT, ELSET=EL_CATHODE
ECD,   hfl, mfle, ecde, conce, elecpote, elecpot, TEMP, EEIG, LE, S, E, peeq, MISES, PRESS, PEQC
CONCGE, EPGE, FLUIDVF, SOLIDVF, BINDERVF
ECHEMQ1, ECHEMQ2, ECHEMQ3, ECHEMQ4, ECHEMQ5, CSURFAVG, ECDBV, LOGGRAINJG, EVOL
CSURF_1, OCP_1, CAVG_1, TOTALC_1, ECDBV_1, OVERPOT_1, ECHEMQ1_1, ECHEMQ2_1, VOLE_1
CSURF_2, OCP_2, CAVG_2, TOTALC_2, ECDBV_2, OVERPOT_2, ECHEMQ1_2, ECHEMQ2_2, VOLE_2
CSURF_3, OCP_3, CAVG_2, TOTALC_3, ECDBV_3, OVERPOT_3, ECHEMQ1_3, ECHEMQ2_3, VOLE_3
SAT, FLVEL
CONCLPL_1 , CONCSEI_1, CONCSOL_1, ECDLPL_1, ECDSEI_1, ECDCRACKSEI_1, ECDELECDISS_1, ECDTOTAL, SEILPLTHICK_1
CONCLPL_2 , CONCSEI_2, CONCSOL_2, ECDLPL_2, ECDSEI_2, ECDCRACKSEI_2, ECDELECDISS_2, ECDTOTAL, SEILPLTHICK_2
CONCLPL_3 , CONCSEI_3, CONCSOL_3, ECDLPL_3, ECDSEI_3, ECDCRACKSEI_3, ECDELECDISS_3, ECDTOTAL, SEILPLTHICK_3
*ELEMENT OUTPUT, ELSET=EL_SEPARATOR
ECD,   hfl, mfle, ecde, conce, elecpote, elecpot, TEMP, EEIG, LE, S, E, peeq, MISES, PRESS, PEQC
CONCGE, EPGE, FLUIDVF, SOLIDVF, BINDERVF
ECHEMQ1, ECHEMQ2, ECHEMQ3, ECHEMQ4, ECHEMQ5, CSURFAVG, ECDBV, LOGGRAINJG, EVOL
CSURF_1, OCP_1, CAVG_1, TOTALC_1, ECDBV_1, OVERPOT_1, ECHEMQ1_1, ECHEMQ2_1, VOLE_1
CSURF_2, OCP_2, CAVG_2, TOTALC_2, ECDBV_2, OVERPOT_2, ECHEMQ1_2, ECHEMQ2_2, VOLE_2
CSURF_3, OCP_3, CAVG_2, TOTALC_3, ECDBV_3, OVERPOT_3, ECHEMQ1_3, ECHEMQ2_3, VOLE_3
SAT, FLVEL
CONCLPL_1 , CONCSEI_1, CONCSOL_1, ECDLPL_1, ECDSEI_1, ECDCRACKSEI_1, ECDELECDISS_1, ECDTOTAL, SEILPLTHICK_1
CONCLPL_2 , CONCSEI_2, CONCSOL_2, ECDLPL_2, ECDSEI_2, ECDCRACKSEI_2, ECDELECDISS_2, ECDTOTAL, SEILPLTHICK_2
CONCLPL_3 , CONCSEI_3, CONCSOL_3, ECDLPL_3, ECDSEI_3, ECDCRACKSEI_3, ECDELECDISS_3, ECDTOTAL, SEILPLTHICK_3
*END STEP
**** -----------------------------------------------------------------------------------------------------------------------
*STEP, NAME=discharge 1, INC=250000000, UNSYMM=YES, NLGEOM=YES
*COUPLED TEMPERATURE-DISPLACEMENT, ELECTROCHEMICAL
0.1,  10000000,  1.0e-6, 10
**
*MONITOR, NODE=SENSOR, DOF=9
*CONTROLS, RESET
**
**
**
**
*STEP CONTROL, ACTION=END STEP, NAME=CONTROLVOLTAGE, DT REFINEMENT=AUTO
"VOLTAGECUTOFF", ABSMIN, 3.05
**
*BOUNDARY, OP=NEW
**NSET-----------,-DOF1,-DOF2,------VALUE,
  REFNODE_BOT      ,    9,    9,        0.0,
nall, 11, 11, 298.15
**
*BOUNDARY, OP=NEW
TOPSRF, 1, 2, 0.
TOPSRF, 3, 3, -7.0e-6
BOTSRF, 1, 3, 0
*CECURRENT, OP=NEW, AMPLITUDE=AMP_CURRENT
  REFNODE ,       9, -1.25
**
*FILM, OP=NEW, AMPLITUDE=AMP_CONST
**ELSET----------,---TYPE,-------------T0,------VALUE,
  EALL ,              FFS,  298.15, 0.1
**
**
*OUTPUT, HISTORY, FREQUENCY=1, SENSOR, NAME=VOLTAGECUTOFF
*NODE OUTPUT, NSET=SENSOR
EPOT
**
**
*OUTPUT, FIELD, freq=200
*node output
  epot, epote, nnce, nt, u
  recure, rflce, por
*element output
hfl, mfle, ecd, ecde, conce, elecpote, elecpot, TEMP,EEIG, LE, S, E, peeq, MISES, PRESS, PEQC
CONCGE, EPGE, FLUIDVF, SOLIDVF, BINDERVF
ECHEMQ1, ECHEMQ2, ECHEMQ3, ECHEMQ4, ECHEMQ5, CSURFAVG, ECDBV, LOGGRAINJG, EVOL
CSURF_1, OCP_1, CAVG_1, TOTALC_1, ECDBV_1, OVERPOT_1, ECHEMQ1_1, ECHEMQ2_1, VOLE_1
CSURF_2, OCP_2, CAVG_2, TOTALC_2, ECDBV_2, OVERPOT_2, ECHEMQ1_2, ECHEMQ2_2, VOLE_2
CSURF_3, OCP_3, CAVG_2, TOTALC_3, ECDBV_3, OVERPOT_3, ECHEMQ1_3, ECHEMQ2_3, VOLE_3
SAT, FLVEL
CONCLPL_1 , CONCSEI_1, CONCSOL_1, ECDLPL_1, ECDSEI_1, ECDCRACKSEI_1, ECDELECDISS_1, ECDTOTAL, SEILPLTHICK_1
CONCLPL_2 , CONCSEI_2, CONCSOL_2, ECDLPL_2, ECDSEI_2, ECDCRACKSEI_2, ECDELECDISS_2, ECDTOTAL, SEILPLTHICK_2
CONCLPL_3 , CONCSEI_3, CONCSOL_3, ECDLPL_3, ECDSEI_3, ECDCRACKSEI_3, ECDELECDISS_3, ECDTOTAL, SEILPLTHICK_3
EPOTLPL, SDV
OVERPOTSEI_1 , OVERPOTCRACKSEI_1, OVERPOTLPL_1, OVERPOTDISS_1
OVERPOTSEI_2 , OVERPOTCRACKSEI_2, OVERPOTLPL_2, OVERPOTDISS_2
OVERPOTSEI_3 , OVERPOTCRACKSEI_3, OVERPOTLPL_3, OVERPOTDISS_3
**
*OUTPUT, HISTORY, FREQUENCY=1
*NODE OUTPUT, nset=BOTSRF
RF3,U3
*NODE OUTPUT, NSET=SENSOR
EPOT, RECUR
*NODE OUTPUT, NSET=VSENSOR
EPOT, RECUR
*NODE OUTPUT, NSET=refnode
EPOT, RECUR
*node output, nset=refnode_bot
RECUR
*NODE OUTPUT, NSET=N_ANODE
epot, epote, nnce, nt, u
recure, rflce, por
*NODE OUTPUT, NSET=N_CATHODE
epot, epote, nnce, nt, u
recure, rflce, por
*NODE OUTPUT, NSET=N_SEPARATOR
epot, epote, nnce, nt, u
recure, rflce, por
**
*ELEMENT OUTPUT
AMOUNT, AMOUNTS, AMOUNTE, amountimmobile
*ELEMENT OUTPUT, ELSET=ANODE
AMOUNT, AMOUNTS, AMOUNTE
*ELEMENT OUTPUT, ELSET=CATHODE
AMOUNT, AMOUNTS, AMOUNTE
*ELEMENT OUTPUT, ELSET=SEPARATOR
AMOUNTE
*ELEMENT OUTPUT, ELSET=EL_ANODE
ECD,   hfl, mfle, ecde, conce, elecpote, elecpot, TEMP, EEIG, LE, S, E, peeq, MISES, PRESS, PEQC
CONCGE, EPGE, FLUIDVF, SOLIDVF, BINDERVF
ECHEMQ1, ECHEMQ2, ECHEMQ3, ECHEMQ4, ECHEMQ5, CSURFAVG, ECDBV, LOGGRAINJG, EVOL
CSURF_1, OCP_1, CAVG_1, TOTALC_1, ECDBV_1, OVERPOT_1, ECHEMQ1_1, ECHEMQ2_1, VOLE_1
CSURF_2, OCP_2, CAVG_2, TOTALC_2, ECDBV_2, OVERPOT_2, ECHEMQ1_2, ECHEMQ2_2, VOLE_2
CSURF_3, OCP_3, CAVG_2, TOTALC_3, ECDBV_3, OVERPOT_3, ECHEMQ1_3, ECHEMQ2_3, VOLE_3
SAT, FLVEL
CONCLPL_1 , CONCSEI_1, CONCSOL_1, ECDLPL_1, ECDSEI_1, ECDCRACKSEI_1, ECDELECDISS_1, ECDTOTAL, SEILPLTHICK_1
CONCLPL_2 , CONCSEI_2, CONCSOL_2, ECDLPL_2, ECDSEI_2, ECDCRACKSEI_2, ECDELECDISS_2, ECDTOTAL, SEILPLTHICK_2
CONCLPL_3 , CONCSEI_3, CONCSOL_3, ECDLPL_3, ECDSEI_3, ECDCRACKSEI_3, ECDELECDISS_3, ECDTOTAL, SEILPLTHICK_3
EPOTLPL, SDV
*ELEMENT OUTPUT, ELSET=EL_CATHODE
ECD,   hfl, mfle, ecde, conce, elecpote, elecpot, TEMP, EEIG, LE, S, E, peeq, MISES, PRESS, PEQC
CONCGE, EPGE, FLUIDVF, SOLIDVF, BINDERVF
ECHEMQ1, ECHEMQ2, ECHEMQ3, ECHEMQ4, ECHEMQ5, CSURFAVG, ECDBV, LOGGRAINJG, EVOL
CSURF_1, OCP_1, CAVG_1, TOTALC_1, ECDBV_1, OVERPOT_1, ECHEMQ1_1, ECHEMQ2_1, VOLE_1
CSURF_2, OCP_2, CAVG_2, TOTALC_2, ECDBV_2, OVERPOT_2, ECHEMQ1_2, ECHEMQ2_2, VOLE_2
CSURF_3, OCP_3, CAVG_2, TOTALC_3, ECDBV_3, OVERPOT_3, ECHEMQ1_3, ECHEMQ2_3, VOLE_3
SAT, FLVEL
CONCLPL_1 , CONCSEI_1, CONCSOL_1, ECDLPL_1, ECDSEI_1, ECDCRACKSEI_1, ECDELECDISS_1, ECDTOTAL, SEILPLTHICK_1
CONCLPL_2 , CONCSEI_2, CONCSOL_2, ECDLPL_2, ECDSEI_2, ECDCRACKSEI_2, ECDELECDISS_2, ECDTOTAL, SEILPLTHICK_2
CONCLPL_3 , CONCSEI_3, CONCSOL_3, ECDLPL_3, ECDSEI_3, ECDCRACKSEI_3, ECDELECDISS_3, ECDTOTAL, SEILPLTHICK_3
EPOTLPL, SDV
*ELEMENT OUTPUT, ELSET=EL_SEPARATOR
ECD,   hfl, mfle, ecde, conce, elecpote, elecpot, TEMP, EEIG, LE, S, E, peeq, MISES, PRESS, PEQC
CONCGE, EPGE, FLUIDVF, SOLIDVF, BINDERVF
ECHEMQ1, ECHEMQ2, ECHEMQ3, ECHEMQ4, ECHEMQ5, CSURFAVG, ECDBV, LOGGRAINJG, EVOL
CSURF_1, OCP_1, CAVG_1, TOTALC_1, ECDBV_1, OVERPOT_1, ECHEMQ1_1, ECHEMQ2_1, VOLE_1
CSURF_2, OCP_2, CAVG_2, TOTALC_2, ECDBV_2, OVERPOT_2, ECHEMQ1_2, ECHEMQ2_2, VOLE_2
CSURF_3, OCP_3, CAVG_2, TOTALC_3, ECDBV_3, OVERPOT_3, ECHEMQ1_3, ECHEMQ2_3, VOLE_3
SAT, FLVEL
CONCLPL_1 , CONCSEI_1, CONCSOL_1, ECDLPL_1, ECDSEI_1, ECDCRACKSEI_1, ECDELECDISS_1, ECDTOTAL, SEILPLTHICK_1
CONCLPL_2 , CONCSEI_2, CONCSOL_2, ECDLPL_2, ECDSEI_2, ECDCRACKSEI_2, ECDELECDISS_2, ECDTOTAL, SEILPLTHICK_2
CONCLPL_3 , CONCSEI_3, CONCSOL_3, ECDLPL_3, ECDSEI_3, ECDCRACKSEI_3, ECDELECDISS_3, ECDTOTAL, SEILPLTHICK_3
EPOTLPL, SDV
*END STEP
**** -----------------------------------------------------------------------------------------------------------------------
*STEP, NAME=discharge 2, INC=250000000, UNSYMM=YES, NLGEOM=YES
*COUPLED TEMPERATURE-DISPLACEMENT, ELECTROCHEMICAL
0.1,  10000000,  1.0e-6, 2
**
*MONITOR, NODE=SENSOR, DOF=9
*CONTROLS, RESET
**
**
**
**
*STEP CONTROL, ACTION=END STEP, NAME=CONTROLVOLTAGE, DT REFINEMENT=AUTO
"VOLTAGECUTOFF", ABSMIN, 3
**
*BOUNDARY, OP=NEW
**NSET-----------,-DOF1,-DOF2,------VALUE,
  REFNODE_BOT      ,    9,    9,        0.0,
nall, 11, 11, 298.15
**
*BOUNDARY, OP=NEW
TOPSRF, 1, 2, 0.
TOPSRF, 3, 3, -7.0e-6
BOTSRF, 1, 3, 0
*CECURRENT, OP=NEW, AMPLITUDE=AMP_CURRENT
  REFNODE ,       9, -1.25
**
*FILM, OP=NEW, AMPLITUDE=AMP_CONST
**ELSET----------,---TYPE,-------------T0,------VALUE,
  EALL ,              FFS,  298.15, 0.1
**
**
*OUTPUT, HISTORY, FREQUENCY=1, SENSOR, NAME=VOLTAGECUTOFF
*NODE OUTPUT, NSET=SENSOR
EPOT
**
**
*OUTPUT, FIELD, freq=200
*node output
  epot, epote, nnce, nt, u
  recure, rflce, por
*element output
hfl, mfle, ecd, ecde, conce, elecpote, elecpot, TEMP,EEIG, LE, S, E, peeq, MISES, PRESS, PEQC
CONCGE, EPGE, FLUIDVF, SOLIDVF, BINDERVF
ECHEMQ1, ECHEMQ2, ECHEMQ3, ECHEMQ4, ECHEMQ5, CSURFAVG, ECDBV, LOGGRAINJG, EVOL
CSURF_1, OCP_1, CAVG_1, TOTALC_1, ECDBV_1, OVERPOT_1, ECHEMQ1_1, ECHEMQ2_1, VOLE_1
CSURF_2, OCP_2, CAVG_2, TOTALC_2, ECDBV_2, OVERPOT_2, ECHEMQ1_2, ECHEMQ2_2, VOLE_2
CSURF_3, OCP_3, CAVG_2, TOTALC_3, ECDBV_3, OVERPOT_3, ECHEMQ1_3, ECHEMQ2_3, VOLE_3
SAT, FLVEL
CONCLPL_1 , CONCSEI_1, CONCSOL_1, ECDLPL_1, ECDSEI_1, ECDCRACKSEI_1, ECDELECDISS_1, ECDTOTAL, SEILPLTHICK_1
CONCLPL_2 , CONCSEI_2, CONCSOL_2, ECDLPL_2, ECDSEI_2, ECDCRACKSEI_2, ECDELECDISS_2, ECDTOTAL, SEILPLTHICK_2
CONCLPL_3 , CONCSEI_3, CONCSOL_3, ECDLPL_3, ECDSEI_3, ECDCRACKSEI_3, ECDELECDISS_3, ECDTOTAL, SEILPLTHICK_3
EPOTLPL, SDV
OVERPOTSEI_1 , OVERPOTCRACKSEI_1, OVERPOTLPL_1, OVERPOTDISS_1
OVERPOTSEI_2 , OVERPOTCRACKSEI_2, OVERPOTLPL_2, OVERPOTDISS_2
OVERPOTSEI_3 , OVERPOTCRACKSEI_3, OVERPOTLPL_3, OVERPOTDISS_3
**
*OUTPUT, HISTORY, FREQUENCY=1
*NODE OUTPUT, nset=BOTSRF
RF3,U3
*NODE OUTPUT, NSET=SENSOR
EPOT, RECUR
*NODE OUTPUT, NSET=VSENSOR
EPOT, RECUR
*NODE OUTPUT, NSET=refnode
EPOT, RECUR
*node output, nset=refnode_bot
RECUR
*NODE OUTPUT, NSET=N_ANODE
epot, epote, nnce, nt, u
recure, rflce, por
*NODE OUTPUT, NSET=N_CATHODE
epot, epote, nnce, nt, u
recure, rflce, por
*NODE OUTPUT, NSET=N_SEPARATOR
epot, epote, nnce, nt, u
recure, rflce, por
**
*ELEMENT OUTPUT
AMOUNT, AMOUNTS, AMOUNTE, amountimmobile
*ELEMENT OUTPUT, ELSET=ANODE
AMOUNT, AMOUNTS, AMOUNTE
*ELEMENT OUTPUT, ELSET=CATHODE
AMOUNT, AMOUNTS, AMOUNTE
*ELEMENT OUTPUT, ELSET=SEPARATOR
AMOUNTE
*ELEMENT OUTPUT, ELSET=EL_ANODE
ECD,   hfl, mfle, ecde, conce, elecpote, elecpot, TEMP, EEIG, LE, S, E, peeq, MISES, PRESS, PEQC
CONCGE, EPGE, FLUIDVF, SOLIDVF, BINDERVF
ECHEMQ1, ECHEMQ2, ECHEMQ3, ECHEMQ4, ECHEMQ5, CSURFAVG, ECDBV, LOGGRAINJG, EVOL
CSURF_1, OCP_1, CAVG_1, TOTALC_1, ECDBV_1, OVERPOT_1, ECHEMQ1_1, ECHEMQ2_1, VOLE_1
CSURF_2, OCP_2, CAVG_2, TOTALC_2, ECDBV_2, OVERPOT_2, ECHEMQ1_2, ECHEMQ2_2, VOLE_2
CSURF_3, OCP_3, CAVG_2, TOTALC_3, ECDBV_3, OVERPOT_3, ECHEMQ1_3, ECHEMQ2_3, VOLE_3
SAT, FLVEL
CONCLPL_1 , CONCSEI_1, CONCSOL_1, ECDLPL_1, ECDSEI_1, ECDCRACKSEI_1, ECDELECDISS_1, ECDTOTAL, SEILPLTHICK_1
CONCLPL_2 , CONCSEI_2, CONCSOL_2, ECDLPL_2, ECDSEI_2, ECDCRACKSEI_2, ECDELECDISS_2, ECDTOTAL, SEILPLTHICK_2
CONCLPL_3 , CONCSEI_3, CONCSOL_3, ECDLPL_3, ECDSEI_3, ECDCRACKSEI_3, ECDELECDISS_3, ECDTOTAL, SEILPLTHICK_3
EPOTLPL, SDV
*ELEMENT OUTPUT, ELSET=EL_CATHODE
ECD,   hfl, mfle, ecde, conce, elecpote, elecpot, TEMP, EEIG, LE, S, E, peeq, MISES, PRESS, PEQC
CONCGE, EPGE, FLUIDVF, SOLIDVF, BINDERVF
ECHEMQ1, ECHEMQ2, ECHEMQ3, ECHEMQ4, ECHEMQ5, CSURFAVG, ECDBV, LOGGRAINJG, EVOL
CSURF_1, OCP_1, CAVG_1, TOTALC_1, ECDBV_1, OVERPOT_1, ECHEMQ1_1, ECHEMQ2_1, VOLE_1
CSURF_2, OCP_2, CAVG_2, TOTALC_2, ECDBV_2, OVERPOT_2, ECHEMQ1_2, ECHEMQ2_2, VOLE_2
CSURF_3, OCP_3, CAVG_2, TOTALC_3, ECDBV_3, OVERPOT_3, ECHEMQ1_3, ECHEMQ2_3, VOLE_3
SAT, FLVEL
CONCLPL_1 , CONCSEI_1, CONCSOL_1, ECDLPL_1, ECDSEI_1, ECDCRACKSEI_1, ECDELECDISS_1, ECDTOTAL, SEILPLTHICK_1
CONCLPL_2 , CONCSEI_2, CONCSOL_2, ECDLPL_2, ECDSEI_2, ECDCRACKSEI_2, ECDELECDISS_2, ECDTOTAL, SEILPLTHICK_2
CONCLPL_3 , CONCSEI_3, CONCSOL_3, ECDLPL_3, ECDSEI_3, ECDCRACKSEI_3, ECDELECDISS_3, ECDTOTAL, SEILPLTHICK_3
EPOTLPL, SDV
*ELEMENT OUTPUT, ELSET=EL_SEPARATOR
ECD,   hfl, mfle, ecde, conce, elecpote, elecpot, TEMP, EEIG, LE, S, E, peeq, MISES, PRESS, PEQC
CONCGE, EPGE, FLUIDVF, SOLIDVF, BINDERVF
ECHEMQ1, ECHEMQ2, ECHEMQ3, ECHEMQ4, ECHEMQ5, CSURFAVG, ECDBV, LOGGRAINJG, EVOL
CSURF_1, OCP_1, CAVG_1, TOTALC_1, ECDBV_1, OVERPOT_1, ECHEMQ1_1, ECHEMQ2_1, VOLE_1
CSURF_2, OCP_2, CAVG_2, TOTALC_2, ECDBV_2, OVERPOT_2, ECHEMQ1_2, ECHEMQ2_2, VOLE_2
CSURF_3, OCP_3, CAVG_2, TOTALC_3, ECDBV_3, OVERPOT_3, ECHEMQ1_3, ECHEMQ2_3, VOLE_3
SAT, FLVEL
CONCLPL_1 , CONCSEI_1, CONCSOL_1, ECDLPL_1, ECDSEI_1, ECDCRACKSEI_1, ECDELECDISS_1, ECDTOTAL, SEILPLTHICK_1
CONCLPL_2 , CONCSEI_2, CONCSOL_2, ECDLPL_2, ECDSEI_2, ECDCRACKSEI_2, ECDELECDISS_2, ECDTOTAL, SEILPLTHICK_2
CONCLPL_3 , CONCSEI_3, CONCSOL_3, ECDLPL_3, ECDSEI_3, ECDCRACKSEI_3, ECDELECDISS_3, ECDTOTAL, SEILPLTHICK_3
EPOTLPL, SDV
*END STEP
**** -----------------------------------------------------------------------------------------------------------------------
*STEP CYCLING, END
**** -----------------------------------------------------------------------------------------------------------------------
